units metal  # Angstroms, eV, picoseconds
boundary p p p
atom_style atomic
read_data lammps.data
#read_restart restart.*.meta
run_style verlet

# loads pet-mad model
pair_style metatomic &
    /work/cosmo/fasching/mad-sol/models/pet_sol-s-best_nostress.pt &
    device cuda &
#Lammps
pair_coeff * * 1 2 3 4 5 6 7 8 9 10 11 12 13 14 15 16 17 18 19 20 21 22 23 24 25 26 27 28 29 30 31 32 33 34 35 36 37 38 39 40 41 42 43 44 45 46 47 48 49 50 51 52 53 54 55 56 57 58 59 60 61 62 63 64 65 66 67 68 69 70 71 72 73 74 75 76 77 78 79 80 81 82 83 84 85 86 87 88 89 90 91 92 93 94 95 96 97 98 99 100 101 102

neigh_modify one 50000 page 500000 binsize 5.5
neighbor 2.0 bin

variable dt equal 0.0005
timestep ${dt}

thermo 100
thermo_style custom step temp pe etotal press vol

#MINIMIZATION
min_style cg
minimize 1.0e-6 1.0e-8 5000 10000
write_data lammps_min.data

velocity all create 330.0 87287 mom yes rot yes

# NVT EQUILIBRATION
fix 1 all temp/csvr 330.0 330.0 0.05 6547
fix 2 all nve
restart 5000 restart.equil.*
run 10000
unfix 1
unfix 2
write_data lammps_nvteq.data

# NpT
dump dump_positions all custom 100 positions.lammpstrj id mass type element xu yu zu vx vy vz
dump_modify dump_positions element H He Li Be B C N O F Ne Na Mg Al Si P S Cl Ar K Ca Sc Ti V Cr Mn Fe Co Ni Cu Zn Ga Ge As Se Br Kr Rb Sr Y Zr Nb Mo Tc Ru Rh Pd Ag Cd In Sn Sb Te I Xe Cs Ba La Ce Pr Nd Pm Sm Eu Gd Tb Dy Ho Er Tm Yb Lu Hf Ta W Re Os Ir Pt Au Hg Tl Pb Bi Po At Rn Fr Ra Ac Th Pa U Np Pu Am Cm Bk Cf Es Fm Md No sort id
dump_modify dump_positions append yes
fix pl all plumed plumedfile plumed.dat outfile p.log
fix 4 all npt temp 330.0 330.0 0.05 iso 1.0 1.0 0.5
restart 5000 restart.prod.*
run 10000000

write_data lammps_npteq.data
write_restart restart.npt.final
