units metal  # Angstroms, eV, picoseconds
boundary p p p
atom_style atomic
read_data 0_solvated.data
run_style verlet
# loads pet-mad model
pair_style metatomic &
    pet &
    device cuda &
#Lammps
pair_coeff * * 1 2 3 4 5 6 7 8 9 10 11 12 13 14 15 16 17 18 19 20 21 22 23 24 25 26 27 28 29 30 31 32 33 34 35 36 37 38 39 40 41 42 43 44 45 46 47 48 49 50 51 52 53 54 55 56 57 58 59 60 61 62 63 64 65 66 67 68 69 70 71 72 73 74 75 76 77 78 79 80 81 82 83 84 85 86 87 88 89 90 91 92 93 94 95 96 97 98 99 100 101 102
neigh_modify one 50000 page 500000 binsize 5.5
neighbor 2.0 bin
variable dt equal 0.0005
timestep ${dt}
thermo 10
thermo_style custom step temp pe etotal press vol
#MINIMIZATION
min_style cg
minimize 1.0e-6 1.0e-8 5000 10000
write_data lammps_min.data
